# OpenSim document version 40000
Model WristModel:
  gravity: 0 0 0
  credits: Model authors names..
  publications: List of publications related to model...
  length_units: meters
  force_units: N
  defaults: Millard2012AccelerationMuscle default: min_control=0.01 optimal_force=1 max_isometric_force=546
      optimal_fiber_length=0.0535 tendon_slack_length=0.078 pennation_angle_at_optimal=0.1396263 [radians]
      max_contraction_velocity=10
  Ground: meshes=wristV2/humerus.vtp
  BodySet:
    Body ulna: mass=0.01 [kg] mass_center=(0 0 0) inertia=(0 0 0 0 0 0) meshes=wristV2/ulna.vtp
    Body radius: mass=0.01 mass_center=(0 0 0) inertia=(0 0 0 0 0 0) meshes=wristV2/radius.vtp
    Body wristP: mass=0.01 mass_center=(0 0 0) inertia=(0 0 0 0 0 0) meshes=wristV2/wristP.vtp
    Body wristD: mass=0.01 mass_center=(0 0 0) inertia=(0 0 0 0 0 0) meshes=wristV2/wristD.vtp
    Body metacarpal1: mass=0.01 mass_center=(0 0 0) inertia=(0 0 0 0 0 0) meshes=wristV2/fingers17.vtp
    Body TMB_phalanx1: mass=0.01 mass_center=(0 0 0) inertia=(0 0 0 0 0 0) meshes=wristV2/fingers18.vtp
    Body TMB_phalanx2: mass=0.01 mass_center=(0 0 0) inertia=(0 0 0 0 0 0) meshes=wristV2/fingers19.vtp
    Body carp_metacarp: mass=0.01 mass_center=(0 0 0) inertia=(0 0 0 0 0 0)
    Body metacarpal2: mass=0.036 mass_center=(-0.01 -0.035 0.03) inertia=(0 0 0 0 0 0) meshes=wristV2/fingers1.vtp
    Body IFphalanx1: mass=0.023 mass_center=(0 -0.03 0.003) inertia=(2.02044e-5 0 2.02044e-5 0 0 0)
        meshes=wristV2/fingers2.vtp
    Body IFphalanx2: mass=0.0083 mass_center=(0 -0.02 0) inertia=(2.33714e-6 0 2.33714e-6 0 0 0)
        meshes=wristV2/fingers3.vtp
    Body IFphalanx3: mass=0.0043 mass_center=(0 -0.015 0) inertia=(5.59358e-7 0 5.59358e-7 0 0 0)
        meshes=wristV2/fingers4.vtp
    Body metacarpal3: mass=0.0495 mass_center=(-0.01 -0.04 0.01) inertia=(0 0 0 0 0 0) meshes=wristV2/fingers8.vtp
    Body MFphalanx1: mass=0.0258 mass_center=(0 -0.03 0) inertia=(2.53525e-5 0 2.53525e-5 0 0 0)
        meshes=wristV2/fingers7.vtp
    Body MFphalanx2: mass=0.0109 mass_center=(0 -0.018 0) inertia=(4.15348e-6 0 4.15348e-6 0 0 0)
        meshes=wristV2/fingers6.vtp
    Body MFphalanx3: mass=0.0051 mass_center=(0 -0.01 0) inertia=(9.809e-7 0 9.809e-7 0 0 0)
        meshes=wristV2/fingers5.vtp
    Body metacarpal4: mass=0.026 mass_center=(-0.005 -0.04 -0.01) inertia=(0 0 0 0 0 0) meshes=wristV2/fingers12.vtp
    Body RFphalanx1: mass=0.021 mass_center=(0 -0.03 0) inertia=(1.88751e-5 0 1.88751e-5 0 0 0)
        meshes=wristV2/fingers11.vtp
    Body RFphalanx2: mass=0.0092 mass_center=(0 -0.018 0) inertia=(3.40556e-6 0 3.40556e-6 0 0 0)
        meshes=wristV2/fingers10.vtp
    Body RFphalanx3: mass=0.0043 mass_center=(0 -0.01 0) inertia=(5.17849e-7 0 5.17849e-7 0 0 0)
        meshes=wristV2/fingers9.vtp
    Body metacarpal5: mass=0.0439 mass_center=(0 -0.035 -0.03) inertia=(0 0 0 0 0 0) meshes=wristV2/fingers16.vtp
    Body LFphalanx1: mass=0.0162 mass_center=(0 -0.025 0) inertia=(0 0 0 0 0 0) meshes=wristV2/fingers15.vtp
    Body LFphalanx2: mass=0.0051 mass_center=(0 -0.015 0) inertia=(0 0 0 0 0 0) meshes=wristV2/fingers14.vtp
    Body LFphalanx3: mass=0.0033 mass_center=(0 -0.008 0) inertia=(0 0 0 0 0 0) meshes=wristV2/fingers13.vtp
    Body ExtExp2: mass=0.0001 mass_center=(0 0.009 0) inertia=(2.725e-5 5e-7 2.725e-5 0 0 0) meshes=cylinder.vtp
    Body ExtExp3: mass=0.0001 mass_center=(0 0.009 0) inertia=(2.725e-5 5e-7 2.725e-5 0 0 0) meshes=cylinder.vtp
    Body ExtExp4: mass=0.0001 mass_center=(0 0.009 0) inertia=(2.725e-5 5e-7 2.725e-5 0 0 0) meshes=cylinder.vtp
    Body ExtExp5: mass=0.0001 mass_center=(0 0.009 0) inertia=(2.725e-5 5e-7 2.725e-5 0 0 0) meshes=cylinder.vtp
  JointSet:
    CustomJoint elbow: socket_parent_frame=ground_offset socket_child_frame=ulna_offset
      Coordinate elbow_flexion: default_value=-1.110223e-16 range=(0 2.268928) clamped=false locked=true
      PhysicalOffsetFrame ground_offset: socket_parent=/ground translation=(0.0127 -0.274 0.0389) [meters]
      PhysicalOffsetFrame ulna_offset: socket_parent=/bodyset/ulna translation=(0 0 0)
      SpatialTransform: axes_held_at_zero=(rotation2 rotation3 translation1 translation2 translation3)
        TransformAxis rotation1: coordinates=elbow_flexion axis=(0.2260469 0.1910399 0.9551997)
            LinearFunction(coefficients=1 0)
    CustomJoint radioulnar: socket_parent_frame=ulna_offset socket_child_frame=radius_offset
      Coordinate pro_sup: default_value=0 range=(-1.570796 1.570796) clamped=false locked=true
      PhysicalOffsetFrame ulna_offset: socket_parent=/bodyset/ulna translation=(-0.0065 -0.008 0.027)
      PhysicalOffsetFrame radius_offset: socket_parent=/bodyset/radius translation=(0 0 0)
      SpatialTransform: axes_held_at_zero=(rotation1 rotation3 translation1 translation2 translation3)
        TransformAxis rotation2: coordinates=pro_sup axis=(0.05639802 0.9835774 -0.1714491)
            LinearFunction(coefficients=1 0)
    CustomJoint updown: socket_parent_frame=radius_offset socket_child_frame=wristP_offset
      Coordinate wrist_deviation: default_value=7.820071e-9 range=(-0.6108652 0.6108652) clamped=false locked=true
      Coordinate wrist_flexion: default_value=2.207402e-16 range=(-1.5708 1.5708) clamped=false locked=true
      PhysicalOffsetFrame radius_offset: socket_parent=/bodyset/radius translation=(-0.0055 -0.2213 0.0561)
          orientation=(-0.26 0.39 0) [radians]
      PhysicalOffsetFrame wristP_offset: socket_parent=/bodyset/wristP translation=(0 0 0)
      SpatialTransform: axes_held_at_zero=(rotation2 translation1 translation2 translation3)
        TransformAxis rotation1: coordinates=wrist_deviation axis=(1 0 0) LinearFunction(coefficients=0.5 0)
        TransformAxis rotation3: coordinates=wrist_flexion axis=(0 0 1) LinearFunction(coefficients=0.5 0)
    CustomJoint leftright: socket_parent_frame=wristP_offset socket_child_frame=wristD_offset
      Coordinate wrist_deviation2: default_value=7.820071e-9 range=(-0.6108652 0.6108652) clamped=false
      Coordinate wrist_flexion2: default_value=2.207402e-16 range=(-1.5708 1.5708) clamped=false
      PhysicalOffsetFrame wristP_offset: socket_parent=/bodyset/wristP translation=(0 -0.02 0)
      PhysicalOffsetFrame wristD_offset: socket_parent=/bodyset/wristD translation=(0 0 0)
      SpatialTransform: axes_held_at_zero=(rotation2 translation1 translation2 translation3)
        TransformAxis rotation1: coordinates=wrist_deviation2 axis=(1 0 0) LinearFunction(coefficients=0.5 0)
        TransformAxis rotation3: coordinates=wrist_flexion2 axis=(0 0 1) LinearFunction(coefficients=0.5 0)
    CustomJoint 1_CMC: socket_parent_frame=carp_metacarp_offset socket_child_frame=metacarpal1_offset
      Coordinate 1_CMC_abd: default_value=4.433329e-13 range=(-0.2617994 0.4617994) clamped=false locked=true
      Coordinate 1_CMC_flex: default_value=0 range=(-0.7853982 1.570796) clamped=false locked=true
      PhysicalOffsetFrame carp_metacarp_offset: socket_parent=/bodyset/carp_metacarp translation=(0.008 -0.0045 0.0219)
          orientation=(0.1 0 0)
      PhysicalOffsetFrame metacarpal1_offset: socket_parent=/bodyset/metacarpal1 translation=(0 0 0)
      SpatialTransform: axes_held_at_zero=(rotation3 translation1 translation2 translation3)
        TransformAxis rotation1: coordinates=1_CMC_abd axis=(1 0 0) LinearFunction(coefficients=1 0)
        TransformAxis rotation2: coordinates=1_CMC_flex axis=(0 1 0) LinearFunction(coefficients=1 0)
    CustomJoint 1_MCP: socket_parent_frame=metacarpal1_offset socket_child_frame=TMB_phalanx1_offset
      Coordinate 1_MCP_lateral: default_value=0 range=(-0.08726646 0.08726646) clamped=true locked=true
      Coordinate 1_MCP_flex: default_value=0 range=(-0.1745329 1.570796) clamped=false locked=true
      PhysicalOffsetFrame metacarpal1_offset: socket_parent=/bodyset/metacarpal1 translation=(0 -0.04 0.04)
          orientation=(-0.85 1.3 0.1)
      PhysicalOffsetFrame TMB_phalanx1_offset: socket_parent=/bodyset/TMB_phalanx1 translation=(-0.005 -0.001 -0.003)
          orientation=(-0.9 1 0.3)
      SpatialTransform: axes_held_at_zero=(rotation2 translation1 translation2 translation3)
        TransformAxis rotation1: coordinates=1_MCP_lateral axis=(1 0 0) LinearFunction(coefficients=1 0)
        TransformAxis rotation3: coordinates=1_MCP_flex axis=(0 0 1) LinearFunction(coefficients=1 0)
    CustomJoint 1_DIP: socket_parent_frame=TMB_phalanx1_offset socket_child_frame=TMB_phalanx2_offset
      Coordinate 1_DIP_flex: default_value=0 range=(-0.08726646 1.570796) clamped=false locked=true
      PhysicalOffsetFrame TMB_phalanx1_offset: socket_parent=/bodyset/TMB_phalanx1 translation=(0.01 -0.032 0.012)
          orientation=(-0.1 1.3 0.2)
      PhysicalOffsetFrame TMB_phalanx2_offset: socket_parent=/bodyset/TMB_phalanx2 translation=(0.004 0.002 -0.002)
          orientation=(0 1.1 0)
      SpatialTransform: axes_held_at_zero=(rotation1 rotation2 translation1 translation2 translation3)
        TransformAxis rotation3: coordinates=1_DIP_flex axis=(0 0 1) LinearFunction(coefficients=1 0)
    WeldJoint wrist_CMC: socket_parent_frame=wristD_offset socket_child_frame=carp_metacarp_offset
      PhysicalOffsetFrame wristD_offset: socket_parent=/bodyset/wristD translation=(0 -0.002 0)
      PhysicalOffsetFrame carp_metacarp_offset: socket_parent=/bodyset/carp_metacarp translation=(0 0 0)
    WeldJoint 2_CMC: socket_parent_frame=carp_metacarp_offset socket_child_frame=metacarpal2_offset
      PhysicalOffsetFrame carp_metacarp_offset: socket_parent=/bodyset/carp_metacarp translation=(-0.005 -0.013 0.0145)
          orientation=(0.174533 0.261799 0)
      PhysicalOffsetFrame metacarpal2_offset: socket_parent=/bodyset/metacarpal2 translation=(0 0 0.02)
    CustomJoint 2_MCP: socket_parent_frame=metacarpal2_offset socket_child_frame=IFphalanx1_offset
      Coordinate 2_MCP_lateral: default_value=8.597723e-16 range=(-0.3490659 0.3490659) clamped=false locked=true
      Coordinate 2_MCP_flex: default_value=0.1745329 range=(-0.1745329 1.570796) clamped=false
      PhysicalOffsetFrame metacarpal2_offset: socket_parent=/bodyset/metacarpal2 translation=(-0.002402 -0.0685 0.045)
      PhysicalOffsetFrame IFphalanx1_offset: socket_parent=/bodyset/IFphalanx1 translation=(0 0 0)
      SpatialTransform: axes_held_at_zero=(rotation2 translation1 translation2 translation3)
        TransformAxis rotation1: coordinates=2_MCP_lateral axis=(1 0 0) LinearFunction(coefficients=1 0)
        TransformAxis rotation3: coordinates=2_MCP_flex axis=(0 0 1) LinearFunction(coefficients=1 0)
    CustomJoint 2_PIP: socket_parent_frame=IFphalanx1_offset socket_child_frame=IFphalanx2_offset
      Coordinate 2_PIP_flex: default_value=-2.354103e-13 range=(-0.08726646 1.570796) clamped=false
      PhysicalOffsetFrame IFphalanx1_offset: socket_parent=/bodyset/IFphalanx1 translation=(0.002 -0.048 0.0093)
      PhysicalOffsetFrame IFphalanx2_offset: socket_parent=/bodyset/IFphalanx2 translation=(0 0 0)
          orientation=(0 0 -0.1)
      SpatialTransform: axes_held_at_zero=(rotation1 rotation2 translation1 translation2 translation3)
        TransformAxis rotation3: coordinates=2_PIP_flex axis=(0 0 1) LinearFunction(coefficients=1 0)
    CustomJoint 2_DIP: socket_parent_frame=IFphalanx2_offset socket_child_frame=IFphalanx3_offset
      Coordinate 2_DIP_flex: default_value=-2.000988e-13 range=(-0.08726646 1.570796) clamped=false
      PhysicalOffsetFrame IFphalanx2_offset: socket_parent=/bodyset/IFphalanx2 translation=(0.00193 -0.03277 0.00472)
      PhysicalOffsetFrame IFphalanx3_offset: socket_parent=/bodyset/IFphalanx3 translation=(0 0 0)
      SpatialTransform: axes_held_at_zero=(rotation1 rotation2 translation1 translation2 translation3)
        TransformAxis rotation3: coordinates=2_DIP_flex axis=(0 0 1) LinearFunction(coefficients=1 0)
    WeldJoint CMC3: socket_parent_frame=carp_metacarp_offset socket_child_frame=metacarpal3_offset
      PhysicalOffsetFrame carp_metacarp_offset: socket_parent=/bodyset/carp_metacarp
          translation=(-0.0047 -0.0085 -0.0015) orientation=(0.0872665 0.174533 0.0872665)
      PhysicalOffsetFrame metacarpal3_offset: socket_parent=/bodyset/metacarpal3 translation=(0 0 0.003)
    CustomJoint 3_MCP: socket_parent_frame=metacarpal3_offset socket_child_frame=MFphalanx1_offset
      Coordinate 3_MCP_lateral: default_value=0 range=(-0.3490659 0.3490659) clamped=false locked=true
      Coordinate 3_MCP_flex: default_value=0 range=(-0.1745329 1.570796) clamped=false locked=true
      PhysicalOffsetFrame metacarpal3_offset: socket_parent=/bodyset/metacarpal3 translation=(-0.005 -0.078 0.016)
      PhysicalOffsetFrame MFphalanx1_offset: socket_parent=/bodyset/MFphalanx1 translation=(-0.001 0 0)
      SpatialTransform: axes_held_at_zero=(rotation2 translation1 translation2 translation3)
        TransformAxis rotation1: coordinates=3_MCP_lateral axis=(1 0 0) LinearFunction(coefficients=1 0)
        TransformAxis rotation3: coordinates=3_MCP_flex axis=(0 0 1) LinearFunction(coefficients=1 0)
    CustomJoint 3_PIP: socket_parent_frame=MFphalanx1_offset socket_child_frame=MFphalanx2_offset
      Coordinate 3_PIP_flex: default_value=-2.775558e-17 range=(-0.08726646 1.570796) clamped=false locked=true
      PhysicalOffsetFrame MFphalanx1_offset: socket_parent=/bodyset/MFphalanx1 translation=(0 -0.055 0.004)
      PhysicalOffsetFrame MFphalanx2_offset: socket_parent=/bodyset/MFphalanx2 translation=(0 0 0)
      SpatialTransform: axes_held_at_zero=(rotation1 rotation2 translation1 translation2 translation3)
        TransformAxis rotation3: coordinates=3_PIP_flex axis=(0 0 1) LinearFunction(coefficients=1 0)
    CustomJoint 3_DIP: socket_parent_frame=MFphalanx2_offset socket_child_frame=MFphalanx3_offset
      Coordinate 3_DIP_flex: default_value=-2.359224e-17 range=(-0.08726646 1.570796) clamped=false
      PhysicalOffsetFrame MFphalanx2_offset: socket_parent=/bodyset/MFphalanx2 translation=(0.002 -0.035 0.003)
      PhysicalOffsetFrame MFphalanx3_offset: socket_parent=/bodyset/MFphalanx3 translation=(0 0 0.0005)
      SpatialTransform: axes_held_at_zero=(rotation1 rotation2 translation1 translation2 translation3)
        TransformAxis rotation3: coordinates=3_DIP_flex axis=(0 0 1) LinearFunction(coefficients=1 0)
    WeldJoint 4_CMC: socket_parent_frame=carp_metacarp_offset socket_child_frame=metacarpal4_offset
      PhysicalOffsetFrame carp_metacarp_offset: socket_parent=/bodyset/carp_metacarp
          translation=(-0.0085 -0.011 -0.012) orientation=(0.0872665 0.174533 0.0872665)
      PhysicalOffsetFrame metacarpal4_offset: socket_parent=/bodyset/metacarpal4 translation=(0 -0.003 -0.009)
    CustomJoint 4_MCP: socket_parent_frame=metacarpal4_offset socket_child_frame=RFphalanx1_offset
      Coordinate 4_MCP_lateral: default_value=0 range=(-0.3490659 0.3490659) clamped=false locked=true
      Coordinate 4_MCP_flex: default_value=0 range=(-0.1745329 1.570796) clamped=false locked=true
      PhysicalOffsetFrame metacarpal4_offset: socket_parent=/bodyset/metacarpal4 translation=(0 -0.078 -0.0055)
      PhysicalOffsetFrame RFphalanx1_offset: socket_parent=/bodyset/RFphalanx1 translation=(0 0 0)
      SpatialTransform: axes_held_at_zero=(rotation2 translation1 translation2 translation3)
        TransformAxis rotation1: coordinates=4_MCP_lateral axis=(1 0 0) LinearFunction(coefficients=1 0)
        TransformAxis rotation3: coordinates=4_MCP_flex axis=(0 0 1) LinearFunction(coefficients=1 0)
    CustomJoint 4_PIP: socket_parent_frame=RFphalanx1_offset socket_child_frame=RFphalanx2_offset
      Coordinate 4_PIP_flex: default_value=5.551115e-17 range=(-0.08726646 1.570796) clamped=false locked=true
      PhysicalOffsetFrame RFphalanx1_offset: socket_parent=/bodyset/RFphalanx1 translation=(0.0061 -0.049 0.0035)
      PhysicalOffsetFrame RFphalanx2_offset: socket_parent=/bodyset/RFphalanx2 translation=(0.003 0 0)
      SpatialTransform: axes_held_at_zero=(rotation1 rotation2 translation1 translation2 translation3)
        TransformAxis rotation3: coordinates=4_PIP_flex axis=(0 0 1) LinearFunction(coefficients=1 0)
    CustomJoint 4_DIP: socket_parent_frame=RFphalanx2_offset socket_child_frame=RFphalanx3_offset
      Coordinate 4_DIP_flex: default_value=4.718448e-17 range=(-0.08726646 1.570796) clamped=false
      PhysicalOffsetFrame RFphalanx2_offset: socket_parent=/bodyset/RFphalanx2 translation=(0.004 -0.03 0.003)
      PhysicalOffsetFrame RFphalanx3_offset: socket_parent=/bodyset/RFphalanx3 translation=(0 0 0)
      SpatialTransform: axes_held_at_zero=(rotation1 rotation2 translation1 translation2 translation3)
        TransformAxis rotation3: coordinates=4_DIP_flex axis=(0 0 1) LinearFunction(coefficients=1 0)
    WeldJoint 5_CMC: socket_parent_frame=carp_metacarp_offset socket_child_frame=metacarpal5_offset
      PhysicalOffsetFrame carp_metacarp_offset: socket_parent=/bodyset/carp_metacarp
          translation=(-0.008 -0.012 -0.0215) orientation=(0.0872665 0.174533 0.0872665)
      PhysicalOffsetFrame metacarpal5_offset: socket_parent=/bodyset/metacarpal5 translation=(0 -0.005 -0.025)
    CustomJoint 5_MCP: socket_parent_frame=metacarpal5_offset socket_child_frame=LFphalanx1_offset
      Coordinate 5_MCP_lateral: default_value=0 range=(-0.3490659 0.3490659) clamped=false locked=true
      Coordinate 5_MCP_flex: default_value=0 range=(-0.1745329 1.570796) clamped=false locked=true
      PhysicalOffsetFrame metacarpal5_offset: socket_parent=/bodyset/metacarpal5 translation=(0 -0.065 -0.035)
      PhysicalOffsetFrame LFphalanx1_offset: socket_parent=/bodyset/LFphalanx1 translation=(0 0 0)
      SpatialTransform: axes_held_at_zero=(rotation2 translation1 translation2 translation3)
        TransformAxis rotation1: coordinates=5_MCP_lateral axis=(1 0 0) LinearFunction(coefficients=1 0)
        TransformAxis rotation3: coordinates=5_MCP_flex axis=(0 0 1) LinearFunction(coefficients=1 0)
    CustomJoint 5_PIP: socket_parent_frame=LFphalanx1_offset socket_child_frame=LFphalanx2_offset
      Coordinate 5_PIP_flex: default_value=-2.775558e-17 range=(-0.08726646 1.570796) clamped=false locked=true
      PhysicalOffsetFrame LFphalanx1_offset: socket_parent=/bodyset/LFphalanx1 translation=(0.0035 -0.042 -0.0015)
      PhysicalOffsetFrame LFphalanx2_offset: socket_parent=/bodyset/LFphalanx2 translation=(0 0 0)
      SpatialTransform: axes_held_at_zero=(rotation1 rotation2 translation1 translation2 translation3)
        TransformAxis rotation3: coordinates=5_PIP_flex axis=(0 0 1) LinearFunction(coefficients=1 0)
    CustomJoint 5_DIP: socket_parent_frame=LFphalanx2_offset socket_child_frame=LFphalanx3_offset
      Coordinate 5_DIP_flex: default_value=-2.359224e-17 range=(-0.08726646 1.570796) clamped=false
      PhysicalOffsetFrame LFphalanx2_offset: socket_parent=/bodyset/LFphalanx2 translation=(0 -0.025 0.0015)
      PhysicalOffsetFrame LFphalanx3_offset: socket_parent=/bodyset/LFphalanx3 translation=(0 0 0)
          orientation=(0 0 -0.1)
      SpatialTransform: axes_held_at_zero=(rotation1 rotation2 translation1 translation2 translation3)
        TransformAxis rotation3: coordinates=5_DIP_flex axis=(0 0 1) LinearFunction(coefficients=1 0)
    SliderJoint ExpJoint2: socket_parent_frame=IFphalanx1_offset socket_child_frame=ExtExp2_offset
      Coordinate Expansion2: default_value=-2.589513e-15 range=(-0.005 0.012)
      PhysicalOffsetFrame IFphalanx1_offset: socket_parent=/bodyset/IFphalanx1 translation=(-0.007 -0.02 0)
          orientation=(-0.2 0 -1.4708)
      PhysicalOffsetFrame ExtExp2_offset: socket_parent=/bodyset/ExtExp2 translation=(0 0 0) orientation=(0 0 1.5708)
    SliderJoint ExpJoint3: socket_parent_frame=MFphalanx1_offset socket_child_frame=ExtExp3_offset
      Coordinate Expansion3: default_value=-3.053113e-19 range=(-0.005 0.012)
      PhysicalOffsetFrame MFphalanx1_offset: socket_parent=/bodyset/MFphalanx1 translation=(-0.008 -0.015 0)
          orientation=(-0.1 0 -1.4708)
      PhysicalOffsetFrame ExtExp3_offset: socket_parent=/bodyset/ExtExp3 translation=(0 0 0) orientation=(0 0 1.5708)
    SliderJoint ExpJoint4: socket_parent_frame=RFphalanx1_offset socket_child_frame=ExtExp4_offset
      Coordinate Expansion4: default_value=6.106227e-19 range=(-0.005 0.012)
      PhysicalOffsetFrame RFphalanx1_offset: socket_parent=/bodyset/RFphalanx1 translation=(-0.006 -0.015 0)
          orientation=(-0.06 0 -1.4708)
      PhysicalOffsetFrame ExtExp4_offset: socket_parent=/bodyset/ExtExp4 translation=(0 0 0) orientation=(0 0 1.5708)
    SliderJoint ExpJoint5: socket_parent_frame=LFphalanx1_offset socket_child_frame=ExtExp5_offset
      Coordinate Expansion5: default_value=-1.94289e-19 range=(-0.005 0.009)
      PhysicalOffsetFrame LFphalanx1_offset: socket_parent=/bodyset/LFphalanx1 translation=(-0.006 -0.015 0)
          orientation=(0.03 0 -1.4708)
      PhysicalOffsetFrame ExtExp5_offset: socket_parent=/bodyset/ExtExp5 translation=(0 0 0) orientation=(0 0 1.5708)
  ConstraintSet:
    CoordinateCouplerConstraint wrist_flex_coupler: independent_coordinate_names=wrist_flexion
        dependent_coordinate_name=wrist_flexion2 scale_factor=1
        coupled_coordinates_function=LinearFunction(coefficients=1 0)
    CoordinateCouplerConstraint wrist_dev_coupler: independent_coordinate_names=wrist_deviation
        dependent_coordinate_name=wrist_deviation2 scale_factor=1
        coupled_coordinates_function=LinearFunction(coefficients=1 0)
    CoordinateCouplerConstraint: independent_coordinate_names=2_PIP_flex dependent_coordinate_name=2_DIP_flex
        scale_factor=1 coupled_coordinates_function=LinearFunction(coefficients=0.85 0)
    CoordinateCouplerConstraint coordinatecouplerconstraint_0: independent_coordinate_names=3_PIP_flex
        dependent_coordinate_name=3_DIP_flex scale_factor=1
        coupled_coordinates_function=LinearFunction(coefficients=0.85 0)
    CoordinateCouplerConstraint coordinatecouplerconstraint_1: independent_coordinate_names=4_PIP_flex
        dependent_coordinate_name=4_DIP_flex scale_factor=1
        coupled_coordinates_function=LinearFunction(coefficients=0.85 0)
    CoordinateCouplerConstraint coordinatecouplerconstraint_2: independent_coordinate_names=5_PIP_flex
        dependent_coordinate_name=5_DIP_flex scale_factor=1
        coupled_coordinates_function=LinearFunction(coefficients=0.85 0)
    CoordinateCouplerConstraint coordinatecouplerconstraint_3: independent_coordinate_names=2_PIP_flex
        dependent_coordinate_name=Expansion2 scale_factor=1
        coupled_coordinates_function=LinearFunction(coefficients=0.011 0)
    CoordinateCouplerConstraint coordinatecouplerconstraint_4: independent_coordinate_names=3_PIP_flex
        dependent_coordinate_name=Expansion3 scale_factor=1
        coupled_coordinates_function=LinearFunction(coefficients=0.011 0)
    CoordinateCouplerConstraint coordinatecouplerconstraint_5: independent_coordinate_names=4_PIP_flex
        dependent_coordinate_name=Expansion4 scale_factor=1
        coupled_coordinates_function=LinearFunction(coefficients=0.011 0)
    CoordinateCouplerConstraint coordinatecouplerconstraint_6: independent_coordinate_names=5_PIP_flex
        dependent_coordinate_name=Expansion5 scale_factor=1
        coupled_coordinates_function=LinearFunction(coefficients=0.007 0)
  ForceSet:
    Millard2012AccelerationMuscle [values shared by the 36 below unless stated]:
      MuscleFirstOrderActivationDynamicModel:
        activation_time_constant: 0.01 [seconds]
        deactivation_time_constant: 0.04 [seconds]
        minimum_activation: 0
      ActiveForceLengthCurve: min_norm_active_fiber_length=0.4441 transition_norm_fiber_length=0.73
          max_norm_active_fiber_length=1.8123 shallow_ascending_slope=0.8616 minimum_value=0
      ForceVelocityCurve: concentric_slope_at_vmax=0 concentric_slope_near_vmax=0.25 isometric_slope=5
          eccentric_slope_at_vmax=0 eccentric_slope_near_vmax=0.15 max_eccentric_velocity_force_multiplier=1.4
          concentric_curviness=0.6 eccentric_curviness=0.9
      FiberForceLengthCurve
      TendonForceLengthCurve
      FiberCompressiveForceLengthCurve
      FiberCompressiveForceCosPennationCurve
    Millard2012AccelerationMuscle FCR: min_control=0.01 optimal_force=1 max_isometric_force=59.7
        optimal_fiber_length=0.0628 tendon_slack_length=0.199 pennation_angle_at_optimal=0.05410521
        max_contraction_velocity=10
      PathPoint P1: ground (0.00639 -0.27761 0.01313)
      PathPoint P2: radius (0.00953 -0.21667 0.05024)
      PathPoint P3: wristD (0.0115062 0.00212057 0.00597769)
      PathPoint P4: metacarpal2 (0.00592 0.00269 0.01328)
    Millard2012AccelerationMuscle FCU: min_control=0.01 optimal_force=1 max_isometric_force=102.6
        optimal_fiber_length=0.0509 tendon_slack_length=0.21 pennation_angle_at_optimal=0.2111848
        max_contraction_velocity=10
      PathPoint P1: ground (0.00463 -0.27768 0.01318)
      ConditionalPathPoint P4: wristD (0.0136415 0.0159565 -0.0215695) socket_coordinate=/jointset/updown/wrist_flexion
          range=(-1.5708 -0.0349066) [radians]
      ConditionalPathPoint P5: wristD (0.0144136 0.00505908 -0.0219007)
          socket_coordinate=/jointset/updown/wrist_flexion range=(-1.5708 0.558505)
      PathPoint P6: metacarpal5 (0.00828834 -0.00913996 -0.0234028)
    Millard2012AccelerationMuscle ECU: min_control=0.01 optimal_force=1 max_isometric_force=117
        optimal_fiber_length=0.0622 tendon_slack_length=0.221 pennation_angle_at_optimal=0.06108652
        max_contraction_velocity=10
      PathPoint P1: ground (0.02268 -0.26804 0.06679)
      PathPoint P2: radius (-0.00239 -0.01019 0.01329)
      PathPoint P3: radius (-0.01094 -0.03546 0.01362)
      PathPoint P4: ulna (-0.02457 -0.09422 0.03348)
      PathPoint P5: ulna (-0.0290931 -0.230847 0.0592747)
      PathPoint P6: wristP (-0.0114815 -0.0131374 -0.0265986)
      PathPoint P7: metacarpal5 (-0.00458 -0.00734 -0.02848)
    Millard2012AccelerationMuscle EDM: min_control=0.01 optimal_force=1 max_isometric_force=28.8
        optimal_fiber_length=0.0675 tendon_slack_length=0.295 pennation_angle_at_optimal=0.05235988
        max_contraction_velocity=10
      PathPoint P1: ground (0.02257 -0.26792 0.06683)
      PathPoint P2: radius (-0.00523 -0.01802 0.01357)
      PathPoint P3: radius (-0.01075 -0.07282 0.01237)
      PathPoint P4: ulna (-0.03277 -0.22628 0.07769)
      ConditionalPathPoint P5: wristP (-0.0124538 -0.0136359 -0.0131284)
          socket_coordinate=/jointset/updown/wrist_flexion range=(0.0872665 1.5708)
      PathPoint P6: metacarpal5 (-0.00895 -0.00546 -0.02267)
      PathPoint P7: metacarpal5 (-0.00837296 -0.0640723 -0.0343996)
      PathPoint P8: LFphalanx1 (-0.00376303 -0.0293638 -0.00289659)
    Millard2012AccelerationMuscle ECRB: min_control=0.01 optimal_force=1 max_isometric_force=122.9
        optimal_fiber_length=0.0585 tendon_slack_length=0.2165 pennation_angle_at_optimal=0.1553343
        max_contraction_velocity=10
      PathPoint P1: ground (0.02254 -0.26813 0.06679)
      PathPoint P2: radius (-0.00384 -0.1248 0.05482)
      PathPoint P3: radius (-0.0154084 -0.208043 0.0666921)
      PathPoint P4: wristD (-0.0165283 0.00253037 0.00396554)
      PathPoint P5: metacarpal3 (-0.0155222 -0.00589398 0.00535788)
    Millard2012AccelerationMuscle ECRL: min_control=0.01 optimal_force=1 max_isometric_force=65.7
        optimal_fiber_length=0.0936 tendon_slack_length=0.198 pennation_angle_at_optimal=0.04363323
        max_contraction_velocity=10
      PathPoint P1: ground (0.01337 -0.26111 0.07069)
      PathPoint P2: ground (0.02239 -0.26834 0.06679)
      PathPoint P3: radius (-0.00136 -0.12953 0.05532)
      PathPoint P4: radius (-0.0083 -0.21052 0.0752)
      ConditionalPathPoint P5: metacarpal2 (-0.01349 0.01118 0.02204)
          socket_coordinate=/jointset/updown/wrist_deviation range=(0 0)
      PathPoint P6: metacarpal2 (-0.01108 -0.01106 0.02568)
    Millard2012AccelerationMuscle FDSI: min_control=0.01 optimal_force=1 max_isometric_force=51.3
        optimal_fiber_length=0.0835 tendon_slack_length=0.322 pennation_angle_at_optimal=0.1047198
        max_contraction_velocity=10
      PathPoint P1: ground (0.0035 -0.29455 0.03226)
      PathPoint default: radius (0.0026385 -0.216783 0.0429626)
      ConditionalPathPoint P4: wristD (0.0106828 0.0162186 -0.00255798)
          socket_coordinate=/jointset/updown/wrist_flexion range=(-1.5708 -0.715585)
      ConditionalPathPoint P5: wristD (0.0143786 0.00691872 -0.000474839)
          socket_coordinate=/jointset/updown/wrist_flexion range=(-1.5708 -0.331613)
      PathPoint P6: wristD (0.0179908 -0.00258168 0.0023135)
      PathPoint P7: metacarpal2 (0.01297 -0.01437 0.02183)
      PathPoint P8: metacarpal2 (0.00543 -0.06688 0.04728)
      PathPoint P9: IFphalanx1 (0.00596 -0.04624 0.00883)
      PathPoint P10: IFphalanx3 (0.00581 -0.0059 0.00263)
    Millard2012AccelerationMuscle FDSM: min_control=0.01 optimal_force=1 max_isometric_force=75.9
        optimal_fiber_length=0.0749 tendon_slack_length=0.345 pennation_angle_at_optimal=0.1221731
        max_contraction_velocity=10
      PathPoint P1: ground (0.0035 -0.29455 0.03226)
      PathPoint default: radius (0.000718755 -0.217299 0.0419429)
      ConditionalPathPoint P4: wristD (0.0114104 0.0169591 -0.00472472)
          socket_coordinate=/jointset/updown/wrist_flexion range=(-1.5708 -0.698132)
      ConditionalPathPoint P5: wristD (0.0159869 0.00794308 -0.00254213)
          socket_coordinate=/jointset/updown/wrist_flexion range=(-1.5708 -0.349066)
      PathPoint P6: wristD (0.017425 -0.00246149 -0.00131668)
      PathPoint P7: metacarpal3 (0.0144 -0.01632 0.01008)
      PathPoint P8: metacarpal3 (0.00551354 -0.0764179 0.0117394)
      PathPoint P9: MFphalanx1 (0.00448211 -0.0501499 0.00348389)
      PathPoint P10: MFphalanx3 (0.00202039 -0.0130966 0.00193893)
    Millard2012AccelerationMuscle FDSR: min_control=0.01 optimal_force=1 max_isometric_force=48.3
        optimal_fiber_length=0.0736 tendon_slack_length=0.33 pennation_angle_at_optimal=0.06981317
        max_contraction_velocity=10
      PathPoint P1: ground (0.0035 -0.29455 0.03226)
      PathPoint default: radius (-0.00037 -0.21764 0.0409)
      ConditionalPathPoint P4: wristD (0.010551 0.0157555 -0.00665657) socket_coordinate=/jointset/updown/wrist_flexion
          range=(-1.5708 -0.698132)
      ConditionalPathPoint P5: wristD (0.0152249 0.00707713 -0.00414443)
          socket_coordinate=/jointset/updown/wrist_flexion range=(-1.5708 -0.349066)
      PathPoint P6: wristD (0.0164002 -0.00389081 -0.00459097)
      PathPoint P7: metacarpal3 (0.0144 -0.0252 -0.00101)
      PathPoint P8: metacarpal4 (0.00797831 -0.0744262 -0.00648141)
      PathPoint P9: RFphalanx1 (0.00915296 -0.050674 0.00106186)
      PathPoint P10: RFphalanx3 (0.00614352 -0.0109946 0.00114242)
    Millard2012AccelerationMuscle FDSL: min_control=0.01 optimal_force=1 max_isometric_force=12
        optimal_fiber_length=0.0515 tendon_slack_length=0.33 pennation_angle_at_optimal=0.08726646
        max_contraction_velocity=10
      PathPoint P1: ground (0.0035 -0.29455 0.03226)
      PathPoint default: radius (-0.00134289 -0.218106 0.039763)
      ConditionalPathPoint P4: wristD (0.00985778 0.0142462 -0.00808846)
          socket_coordinate=/jointset/updown/wrist_flexion range=(-1.5708 -0.698132)
      ConditionalPathPoint P5: wristD (0.0148976 0.00540251 -0.00570167)
          socket_coordinate=/jointset/updown/wrist_flexion range=(-1.5708 -0.349066)
      PathPoint P6: wristD (0.0166199 -0.00421162 -0.00771187)
      PathPoint P7: metacarpal4 (0.01463 -0.02498 -0.01151)
      PathPoint P8: metacarpal5 (0.00674 -0.06152 -0.0347)
      PathPoint P9: LFphalanx1 (0.00620677 -0.0408997 0.00054592)
      PathPoint P10: LFphalanx3 (0.00345335 -0.012047 0.00131278)
    Millard2012AccelerationMuscle FDPI: min_control=0.01 optimal_force=1 max_isometric_force=53.1
        optimal_fiber_length=0.0749 tendon_slack_length=0.31 pennation_angle_at_optimal=0.1221731
        max_contraction_velocity=10
      PathPoint P1: ulna (-0.0113 -0.03157 0.00208)
      PathPoint default: radius (0.000861186 -0.216376 0.0462555)
      ConditionalPathPoint P4: wristD (0.00716912 0.0124649 0.00201533)
          socket_coordinate=/jointset/updown/wrist_flexion range=(-1.5708 -0.383972)
      ConditionalPathPoint P5: wristD (0.0109499 0.000471287 0.0069585)
          socket_coordinate=/jointset/updown/wrist_flexion range=(-1.5708 -0.383972)
      PathPoint P6: metacarpal2 (0.0100977 -0.00148589 0.020854)
      PathPoint P7: metacarpal2 (0.00363 -0.06662 0.0449)
      PathPoint P8: IFphalanx1 (0.00494 -0.0506 0.00914)
      PathPoint P9: IFphalanx2 (0.00615079 -0.0304472 0.00406219)
    Millard2012AccelerationMuscle FDPM: min_control=0.01 optimal_force=1 max_isometric_force=66.9
        optimal_fiber_length=0.0835 tendon_slack_length=0.305 pennation_angle_at_optimal=0.1047198
        max_contraction_velocity=10
      PathPoint P1: ulna (-0.0113 -0.03157 0.00208)
      PathPoint default: radius (-0.00103439 -0.216454 0.0453068)
      ConditionalPathPoint P4: wristD (0.00581168 0.0102331 -0.00389786)
          socket_coordinate=/jointset/updown/wrist_flexion range=(-1.5708 -0.436332)
      ConditionalPathPoint P5: wristD (0.0129848 -0.00151697 -0.00216817)
          socket_coordinate=/jointset/updown/wrist_flexion range=(-1.5708 -0.174533)
      PathPoint P6: metacarpal3 (0.01168 -0.00745 0.00755)
      PathPoint P7: metacarpal3 (0.00431518 -0.0763668 0.0112835)
      PathPoint P8: MFphalanx1 (0.00284492 -0.0502956 0.00490369)
      PathPoint P9: MFphalanx2 (0.00604596 -0.0300509 0.00343428)
    Millard2012AccelerationMuscle FDPR: min_control=0.01 optimal_force=1 max_isometric_force=51.6
        optimal_fiber_length=0.0798 tendon_slack_length=0.303 pennation_angle_at_optimal=0.1221731
        max_contraction_velocity=10
      PathPoint P1: ulna (-0.0113 -0.03157 0.00208)
      PathPoint default: radius (-0.00205303 -0.217168 0.043943)
      ConditionalPathPoint P4: wristD (0.00619759 0.0118194 -0.00810627)
          socket_coordinate=/jointset/updown/wrist_flexion range=(-1.5708 -0.436332)
      ConditionalPathPoint P5: wristD (0.0131338 3.06728e-5 -0.00915641)
          socket_coordinate=/jointset/updown/wrist_flexion range=(-1.5708 0.174533)
      PathPoint P6: metacarpal3 (0.0126301 -0.0112992 -0.000603877)
      PathPoint P7: metacarpal4 (0.00784495 -0.074491 -0.00501108)
      PathPoint P8: RFphalanx1 (0.00752434 -0.051199 0.00358619)
      PathPoint P9: RFphalanx2 (0.0089295 -0.0323619 0.00214101)
    Millard2012AccelerationMuscle FDPL: min_control=0.01 optimal_force=1 max_isometric_force=66
        optimal_fiber_length=0.0749 tendon_slack_length=0.29 pennation_angle_at_optimal=0.1396263
        max_contraction_velocity=10
      PathPoint P1: ulna (-0.0113 -0.03157 0.00208)
      PathPoint default: radius (-0.00265189 -0.217898 0.0423573)
      ConditionalPathPoint P4: wristD (0.00606523 0.012089 -0.0109007) socket_coordinate=/jointset/updown/wrist_flexion
          range=(-1.5708 -0.436332)
      ConditionalPathPoint P5: wristD (0.0108297 0.000177979 -0.0121656)
          socket_coordinate=/jointset/updown/wrist_flexion range=(-1.5708 0.19984)
      PathPoint P6: metacarpal4 (0.0122687 -0.013167 -0.0076371)
      PathPoint P7: metacarpal5 (0.00655 -0.06359 -0.03689)
      PathPoint P8: LFphalanx1 (0.00675371 -0.0413354 -0.00106923)
      PathPoint P9: LFphalanx2 (0.00402973 -0.0290676 0.00042022)
    Millard2012AccelerationMuscle EDCL: min_control=0.01 optimal_force=1 max_isometric_force=18
        optimal_fiber_length=0.065 tendon_slack_length=0.285 pennation_angle_at_optimal=0.03490659
        max_contraction_velocity=10
      PathPoint P1: ground (0.01056 -0.26789 0.07127)
      PathPoint P2: radius (-0.0082 -0.04004 0.01668)
      PathPoint P3: radius (-0.0203347 -0.185082 0.0466818)
      PathPoint P4: radius (-0.02211 -0.21097 0.05287)
      PathPoint default: wristP (-0.0198929 -0.00768392 -0.0116663)
      ConditionalPathPoint P6: wristD (-0.0176843 -0.00392045 -0.0144544)
          socket_coordinate=/jointset/updown/wrist_flexion range=(0 1.5708)
      PathPoint P8: metacarpal5 (-0.00801 -0.06389 -0.03508)
      PathPoint P9: LFphalanx1 (-0.0041999 -0.0293033 -0.00216133)
    Millard2012AccelerationMuscle EDCR: min_control=0.01 optimal_force=1 max_isometric_force=38.7
        optimal_fiber_length=0.0626 tendon_slack_length=0.305 pennation_angle_at_optimal=0.05235988
        max_contraction_velocity=10
      PathPoint P1: ground (0.01011 -0.26789 0.07127)
      PathPoint P2: radius (-0.0082 -0.04004 0.01668)
      PathPoint P3: radius (-0.0181979 -0.184968 0.0479648)
      PathPoint P4: radius (-0.02021 -0.21 0.054)
      PathPoint default: wristP (-0.01948 -0.00805785 -0.00806121)
      ConditionalPathPoint P6: wristD (-0.0173614 -0.00286181 -0.00905306)
          socket_coordinate=/jointset/updown/wrist_flexion range=(0.226893 1.74533)
      PathPoint P7: metacarpal4 (-0.0104956 -0.0759619 -0.00526113)
      PathPoint P8: RFphalanx1 (-0.00639613 -0.0274419 0.00102356)
    Millard2012AccelerationMuscle EDCM: min_control=0.01 optimal_force=1 max_isometric_force=45.9
        optimal_fiber_length=0.0724 tendon_slack_length=0.295 pennation_angle_at_optimal=0.05235988
        max_contraction_velocity=10
      PathPoint P1: ground (0.01011 -0.26789 0.07127)
      PathPoint P2: radius (-0.0082 -0.04004 0.01668)
      PathPoint P3: radius (-0.0173975 -0.184703 0.0499935)
      PathPoint P4: radius (-0.0207226 -0.210247 0.0562232)
      PathPoint default: wristP (-0.0202598 -0.00807607 -0.00495145)
      ConditionalPathPoint P6: metacarpal3 (-0.01257 0.00659 -0.00208) socket_coordinate=/jointset/updown/wrist_flexion
          range=(-0.349066 1.74533)
      PathPoint P7: metacarpal3 (-0.0153729 -0.0739348 0.0128043)
      PathPoint P8: MFphalanx1 (-0.00786419 -0.0268954 0.000659147)
    Millard2012AccelerationMuscle EDCI: min_control=0.01 optimal_force=1 max_isometric_force=23.4
        optimal_fiber_length=0.07 tendon_slack_length=0.295 pennation_angle_at_optimal=0.05235988
        max_contraction_velocity=10
      PathPoint P1: ground (0.01011 -0.26789 0.07127)
      PathPoint P2: radius (-0.0082 -0.04004 0.01668)
      PathPoint P3: radius (-0.0178616 -0.181532 0.0514296)
      PathPoint P4: radius (-0.0210097 -0.20866 0.0582608)
      PathPoint default: wristP (-0.0190491 -0.0069516 0.00112348)
      ConditionalPathPoint P6: wristD (-0.016 -0.007 0.008) socket_coordinate=/jointset/updown/wrist_flexion
          range=(0 1.5708)
      PathPoint P8: metacarpal2 (-0.0130259 -0.0663662 0.041942)
      PathPoint P8_0: IFphalanx1 (-0.00694784 -0.0305455 0.00347787)
    Millard2012AccelerationMuscle FPL: min_control=0.01 optimal_force=1 max_isometric_force=62.4
        optimal_fiber_length=0.0552 tendon_slack_length=0.212 pennation_angle_at_optimal=0.1221731
        max_contraction_velocity=10
      PathPoint P1: radius (-0.00284 -0.09605 0.02992)
      PathPoint P2: radius (-0.00166 -0.13532 0.04257)
      PathPoint P3: radius (-0.00037 -0.16882 0.04439)
      PathPoint default: radius (0.00345 -0.21433 0.04621)
      PathPoint default_0: wristD (0.0158141 0.000164401 0.0131398)
      PathPoint P6: metacarpal1 (0.0063 -0.0177 0.0199)
      PathPoint P7: metacarpal1 (9e-5 -0.04175 0.03446)
      PathPoint P8: TMB_phalanx1 (-0.00128694 -0.0122503 -0.00742661)
      PathPoint P9: TMB_phalanx1 (0.0054103 -0.0351775 0.00438924)
      PathPoint P10: TMB_phalanx2 (0.00215222 -0.0168656 0.00262741)
    Millard2012AccelerationMuscle APL: min_control=0.01 optimal_force=1 max_isometric_force=57.9
        optimal_fiber_length=0.0713 tendon_slack_length=0.111 pennation_angle_at_optimal=0.1308997
        max_contraction_velocity=10
      PathPoint P1: radius (-0.00494 -0.09677 0.03004)
      PathPoint P2: radius (-0.00892 -0.13772 0.05255)
      PathPoint P3: radius (-0.0066 -0.15947 0.06132)
      PathPoint P4: radius (-0.00682 -0.17731 0.06462)
      PathPoint P5: radius (-0.00282 -0.20831 0.07607)
      ConditionalPathPoint P6: radius (0.00117 -0.21506 0.07845) socket_coordinate=/jointset/updown/wrist_flexion
          range=(-1.5708 -0.471239)
      ConditionalPathPoint P7: wristD (0.0103706 0.00609431 0.0307303) socket_coordinate=/jointset/updown/wrist_flexion
          range=(-1.5708 0.785398)
      PathPoint P8: metacarpal1 (0.00384 0.00196 0.01452)
      PathPoint P9: metacarpal1 (0.00816 -0.02324 0.03082)
    Millard2012AccelerationMuscle EPB: min_control=0.01 optimal_force=1 max_isometric_force=14.1
        optimal_fiber_length=0.0675 tendon_slack_length=0.12 pennation_angle_at_optimal=0.1256637
        max_contraction_velocity=10
      PathPoint P1: radius (-0.00294 -0.13573 0.04196)
      PathPoint P2: radius (-0.00701 -0.14896 0.04387)
      PathPoint P3: radius (-0.01283 -0.17881 0.05817)
      PathPoint P4: radius (-0.00547 -0.19041 0.06961)
      PathPoint P5: radius (0.00469 -0.21769 0.0756)
      ConditionalPathPoint P6: wristD (0.00172758 0.00557345 0.0304842)
          socket_coordinate=/jointset/updown/wrist_flexion range=(-1.5708 -0.349066)
      PathPoint P7: metacarpal1 (-0.00387 0.00011 0.01647)
      PathPoint P8: metacarpal1 (0.00452 -0.02214 0.03593)
      PathPoint P9: metacarpal1 (0.0073 -0.03012 0.04408)
      PathPoint P10: TMB_phalanx1 (0.00537114 -0.0258376 0.0157018)
    Millard2012AccelerationMuscle EPL: min_control=0.01 optimal_force=1 max_isometric_force=44.1
        optimal_fiber_length=0.054 tendon_slack_length=0.23 pennation_angle_at_optimal=0.1047198
        max_contraction_velocity=10
      PathPoint P1: ulna (-0.02127 -0.0916 0.03268)
      PathPoint P2: radius (-0.01652 -0.16952 0.03814)
      PathPoint P3: radius (-0.01762 -0.20537 0.0523)
      PathPoint P4: wristP (-0.0123325 -0.00272105 0.000371812)
      PathPoint P5: wristP (-0.0102244 -0.0113338 0.0127334)
      PathPoint P6: metacarpal1 (-0.0133 -0.00263 0.01214)
      PathPoint P7: metacarpal1 (-0.00352 -0.03198 0.04462)
      PathPoint P8: TMB_phalanx1 (-0.00769307 -0.00540385 0.00502535)
      PathPoint P9: TMB_phalanx1 (-0.00113439 -0.0284862 0.0151699)
      PathPoint P10: TMB_phalanx2 (-0.00165106 -0.0129545 0.00689632)
    Millard2012AccelerationMuscle EIP: min_control=0.01 optimal_force=1 max_isometric_force=25.2
        optimal_fiber_length=0.0589 tendon_slack_length=0.165 pennation_angle_at_optimal=0.1047198
        max_contraction_velocity=10
      PathPoint P1: ulna (-0.01974 -0.14668 0.04449)
      PathPoint P2: radius (-0.017104 -0.207011 0.0528767)
      PathPoint P3: wristP (-0.0169824 -0.000719247 0.000179735)
      PathPoint P4: metacarpal2 (-0.01312 0.00595 0.0075)
      PathPoint P5: metacarpal2 (-0.0120898 -0.0676458 0.0382416)
      PathPoint default: IFphalanx1 (-0.00667515 -0.0307706 0.00161441)
    Millard2012AccelerationMuscle PL: min_control=0.01 optimal_force=1 max_isometric_force=20.7
        optimal_fiber_length=0.0638 tendon_slack_length=0.219 pennation_angle_at_optimal=0.06981317
        max_contraction_velocity=10
      PathPoint P1: ground (0.00468 -0.27698 0.01316)
      PathPoint P2: radius (0.01122 -0.20758 0.04487)
      ConditionalPathPoint P3: wristD (0.0118916 0.00236776 0.000593201)
          socket_coordinate=/jointset/updown/wrist_flexion range=(-1.5708 0.593412)
      PathPoint P4: metacarpal3 (0.00932 -0.02377 0.00981)
    Millard2012AccelerationMuscle LUM1: max_isometric_force=3.85 optimal_fiber_length=0.068 tendon_slack_length=0.04
        pennation_angle_at_optimal=0.01
      PathPoint LUM1_1: wristD (0.013 -0.009 0.01)
      PathPoint LUM1_2: IFphalanx1 (-0.00202003 -0.0101203 0.0100708)
      PathPoint LUM1_3: ExtExp2 (0 0.023 0.003)
    Millard2012AccelerationMuscle DI1: max_isometric_force=52.2 optimal_fiber_length=0.038 tendon_slack_length=0.052
        pennation_angle_at_optimal=0.01
      PathPoint DI1_1: metacarpal2 (-0.009 -0.012 0.028)
      PathPoint DI1_2: metacarpal2 (-0.003 -0.064 0.051)
      PathPoint DI1_3: IFphalanx1 (0.001 -0.012 0.009)
      PathPoint DI1_4: ExtExp2 (0.001 0.006 0.001)
    Millard2012AccelerationMuscle PI1: max_isometric_force=26.25 optimal_fiber_length=0.031 tendon_slack_length=0.071
        pennation_angle_at_optimal=0.01
      PathPoint PI1_1: metacarpal2 (0.003 -0.008 0.019)
      PathPoint PI1_2: IFphalanx1 (0.002 -0.018 -0.008)
      PathPoint PI1_3: ExtExp2 (-0.001 0.022 -0.002)
    Millard2012AccelerationMuscle LUM2: max_isometric_force=2.8 optimal_fiber_length=0.068 tendon_slack_length=0.03
        pennation_angle_at_optimal=0.01
      PathPoint LUM2_1: wristD (0.012 -0.01 -0.001)
      PathPoint LUM2_2: MFphalanx1 (-0.00185087 -0.00576043 0.00747687)
      PathPoint LUM2_3: ExtExp3 (0 0.023 0.003)
    Millard2012AccelerationMuscle PI2: max_isometric_force=22.75 optimal_fiber_length=0.032 tendon_slack_length=0.067
        pennation_angle_at_optimal=0.01
      PathPoint PI2_1: metacarpal4 (0.004 -0.015 -0.002)
      PathPoint PI2_2: RFphalanx1 (-0.002 -0.009 0.01)
      PathPoint PI2_3: ExtExp4 (-0.001 0.022 0.002)
    Millard2012AccelerationMuscle DI2: max_isometric_force=46.9 optimal_fiber_length=0.031 tendon_slack_length=0.058
        pennation_angle_at_optimal=0.01
      PathPoint DI2_1: metacarpal3 (-0.008 -0.014 0.011)
      PathPoint DI2_2: metacarpal3 (-0.002 -0.072 0.021)
      PathPoint DI2_3: MFphalanx1 (0.001 -0.012 0.009)
      PathPoint DI2_4: ExtExp3 (0.001 0.006 0.001)
    Millard2012AccelerationMuscle LUM3: max_isometric_force=2.8 optimal_fiber_length=0.068 tendon_slack_length=0.03
        pennation_angle_at_optimal=0.01
      PathPoint LUM3_1: wristD (0.012 -0.008 -0.011)
      PathPoint LUM3_2: RFphalanx1 (-0.001 -0.007 0.008)
      PathPoint LUM3_3: ExtExp4 (0 0.023 0.003)
    Millard2012AccelerationMuscle PI3: max_isometric_force=21.35 optimal_fiber_length=0.028 tendon_slack_length=0.059
        pennation_angle_at_optimal=0.01
      PathPoint PI3_1: metacarpal5 (0.005 -0.011 -0.023)
      PathPoint PI3_2: LFphalanx1 (-0.001 -0.008 0.008)
      PathPoint PI3_3: ExtExp5 (-0.001 0.022 0.002)
    Millard2012AccelerationMuscle DI3: max_isometric_force=33.25 optimal_fiber_length=0.031 tendon_slack_length=0.057
        pennation_angle_at_optimal=0.01
      PathPoint DI3_1: metacarpal3 (-0.008 -0.015 0)
      PathPoint DI3_2: metacarpal3 (-0.002 -0.072 0.005)
      PathPoint DI3_3: MFphalanx1 (0.001 -0.012 -0.009)
      PathPoint DI3_4: ExtExp3 (0.001 0.006 0.001)
    Millard2012AccelerationMuscle LUM4: max_isometric_force=2.1 optimal_fiber_length=0.061 tendon_slack_length=0.03
        pennation_angle_at_optimal=0.01
      PathPoint LUM4_1: wristD (0.01 -0.01 -0.018)
      PathPoint LUM4_2: LFphalanx1 (-0.001 -0.007 0.008)
      PathPoint LUM4_3: ExtExp5 (0.001 0.022 0.001)
    Millard2012AccelerationMuscle DI4: max_isometric_force=31.83 optimal_fiber_length=0.031 tendon_slack_length=0.059
        pennation_angle_at_optimal=0.01
      PathPoint DI4_1: metacarpal4 (-0.008 -0.016 -0.012)
      PathPoint DI4_2: metacarpal4 (-0.002 -0.072 -0.015)
      PathPoint DI4_3: RFphalanx1 (0.001 -0.012 -0.009)
      PathPoint DI4_4: ExtExp4 (0.001 0.006 0.001)
    SpringGeneralizedForce 1_CMC_abd_spring: coordinate=1_CMC_abd stiffness=0.35 rest_length=0
    SpringGeneralizedForce 1_MCP_lateralspring: coordinate=1_MCP_lateral stiffness=0.1 rest_length=0
    SpringGeneralizedForce 1_MCPspring: coordinate=1_MCP_flex stiffness=0.1 rest_length=0
    SpringGeneralizedForce 1_DIPspring: coordinate=1_DIP_flex stiffness=0.1
    SpringGeneralizedForce 2_MCP_lateralspring: coordinate=2_MCP_lateral stiffness=0.1 rest_length=0
    SpringGeneralizedForce 2_MCPspring: coordinate=2_MCP_flex stiffness=0.1 rest_length=0
    SpringGeneralizedForce 2_PIPspring: coordinate=2_PIP_flex stiffness=0.1
    SpringGeneralizedForce 3_MCP_lateralspring: coordinate=3_MCP_lateral stiffness=0.3 rest_length=0
    SpringGeneralizedForce 3_MCPspring: coordinate=3_MCP_flex stiffness=0.1 rest_length=0
    SpringGeneralizedForce 3_PIPspring: coordinate=3_PIP_flex stiffness=0.1
    SpringGeneralizedForce 4_MCP_lateralspring: coordinate=4_MCP_lateral stiffness=0.1 rest_length=0
    SpringGeneralizedForce 4_MCPspring: coordinate=4_MCP_flex stiffness=0.1 rest_length=0
    SpringGeneralizedForce 4_PIPspring: coordinate=4_PIP_flex stiffness=0.1
    SpringGeneralizedForce 5_MCP_lateralspring: coordinate=5_MCP_lateral stiffness=0.1 rest_length=0
    SpringGeneralizedForce 5_MCPspring: coordinate=5_MCP_flex stiffness=0.1 rest_length=0
    SpringGeneralizedForce 5_PIPspring: coordinate=5_PIP_flex stiffness=0.1
    Millard2012AccelerationMuscle FDMB: max_isometric_force=18.9 optimal_fiber_length=0.05 tendon_slack_length=0.022
        pennation_angle_at_optimal=0.01
      PathPoint FDMB_1: wristP (0.0104956 -0.02644 -0.0152476)
      PathPoint FDMB_2: LFphalanx1 (0.00569945 -0.00708223 -0.00529293)
    ObjectGroup Flexors: members=(FCR FCU FPL FDSI FDSM FDSR FDSL FDPI FDPM FDPR FDPL PL)
    ObjectGroup Extensors: members=(EDCI EDCM EDCR EDCL EDM EIP APL EPB EPL ECRL ECRB ECU)
    ObjectGroup Intrinsics: members=(LUM1 LUM2 LUM3 LUM4 DI1 DI2 DI3 DI4 PI1 PI2 PI3 FDMB)
